variable    	seed equal 102486
variable    	T equal 500
variable    	V equal vol
variable    	P equal 1.01325 # 1 atm in bar
variable    	dt equal 0.001 # 1 fs in metal
variable    	r equal 900000
variable    	p equal 30000    # correlation length
variable    	s equal 1     	 # sample interval
variable    	d equal $p*$s  	 # dump interval
variable    	kB equal 1.3806504e-23    # [J/K] Boltzmann

# Convert from LAMMPS metal units to SI
variable    	eV2J equal 96485.31/6.02214e23
variable    	ps2s equal 1.0e-12
variable    	A2m equal 1.0e-10
variable    	convert equal ${eV2J}*${eV2J}/${ps2s}/${A2m}

# Initialization
units		metal
dimension	3
boundary	p p m
atom_style	charge
box		tilt large

# Read Data
read_data	389.lmp
replicate	1 1 1
mass            1 12.0107 # C

# Potential (AIREBO)
pair_style	airebo 2.0
pair_coeff	* * CH.airebo C

# Minimization
thermo		10
neigh_modify	every 1 delay 0 check yes
min_style	fire
min_modify	dmax 2.0 line quadratic
minimize	1.0e-9 1.0e-9 100000 100000
neigh_modify	delay 0
reset_timestep	0

# Equilibration and Thermalization
timestep	${dt}
thermo       	3000
thermo_style	custom step temp pe ke etotal press vol
velocity     	all create $T ${seed} mom yes rot yes dist gaussian
fix         	2 all nvt temp $T $T ${dt}
run          	100000

# Thermal conductivity calculation
unfix		2
thermo       	3000
thermo_style	custom step temp pe ke etotal press vol
fix		NVE all nve
compute      	myKE all ke/atom
compute      	myPE all pe/atom
compute      	myStress all stress/atom NULL virial
compute      	flux all heat/flux myKE myPE myStress
variable     	Jx equal c_flux[1]/vol
variable     	Jy equal c_flux[2]/vol
variable     	Jz equal c_flux[3]/vol
fix          	JJ all ave/correlate $s $p $d &
             	c_flux[1] c_flux[2] c_flux[3] type auto file J0Jt.dat ave running
variable     	scale equal ${convert}/${kB}/$T/$T/$V*$s*${dt}
variable     	k11 equal trap(f_JJ[3])*${scale}
variable     	k22 equal trap(f_JJ[4])*${scale}
variable     	k33 equal trap(f_JJ[5])*${scale}

print		"scale"
print		${scale}
run        	$r

print		"SIMULATION DONE"
